New WireData.556_5acsr Rdc=0.115512 Runits=km diam=23.5458 Radunits=mm emergamps=1095
New WireData.n1acsr Rdc=0.695935 Runits=km diam=10.1092 Radunits=mm emergamps=345
New WireData.n4acsr Rdc=0.367852 Runits=km diam=14.3002 Radunits=mm emergamps=510
