New PVSystem.05fdc0d0-8593-4be1-9eae-96f007fe7295 phases=3 bus1=ca1022a3-cb05-4f09-ac8a-53e587b96346.1.2.3 kv=13.2 irradiance=1.0 pmpp=2000.0 temperature=25 kva=2500 effcurve=gfv01e_0100 daily=gfv01i_0100 tdaily=gfv01t_0100
