New Capacitor.cap01_0050 bus1=3806706_p_2.1.2.3 kv=0.4 kvar=5.0 phases=3
New Capacitor.cap02_0100 bus1=3806374_p_2.1.2.3 kv=0.4 kvar=10.0 phases=3
New Capacitor.cap03_0070 bus1=3812380_p_1.1.2.3 kv=10.0 kvar=7.0 phases=3
