New Recloser.d3d4a264-8fb4-476f-a89d-73fb88c29482 MonitoredObj=Line.lohl650_632 MonitoredTerm=1 SwitchedObj=Line.lohl650_632 SwitchedTerm=1 PhaseFast=101 PhaseDelayed=133 PhaseTrip=1200 PhaseInst=0.0 TDPhFast=1.0 TDPhDelayed=1.0 GroundTrip=600 GroundInst=0.0 TDGrFast=1.0 TDGrDelayed=1.0 NumFast=1 Shots=4 RecloseIntervals=[2. 2. 5.] Delay=0.042 Reset=15.0 State=closed
