New Relay.bc18a4d4-ef02-41f1-b737-4c69da59240d MonitoredObj=Line.lohl650_632 MonitoredTerm=2 SwitchedObj=Line.lohl650_632 SwitchedTerm=2 type=Current PhaseTrip=1200.0 GroundTrip=600.0 TDPhase=1.0 TDGround=1.0 PhaseInst=0.0 GroundInst=0.0 Reset=15.0 Shots=4 RecloseIntervals=[0.5 2.  2. ] Delay=0.1 Breakertime=0.0 State=closed
