New TCC_Curve.klink npts=6 c_array=(2.0 2.2 3.0 4.0 6.0 30.0) t_array=(300.0 20.0 4.0 1.3 0.41 0.02)
New TCC_Curve.uv1547 npts=2 c_array=(0.5 0.9) t_array=(0.166 2.0)
New TCC_Curve.ov1547 npts=2 c_array=(1.1 1.2) t_array=(1.0 0.166)
New TCC_Curve.101 npts=8 c_array=(1.0 1.5 1.7 2.0 2.5 3.0 6.0 10.0) t_array=(0.14 0.036 0.025 0.022 0.018 0.016 0.015 0.015)
New TCC_Curve.133 npts=7 c_array=(1.0 10.0 15.0 25.0 35.0 50.0 100.0) t_array=(14.0 0.16 0.09 0.052 0.042 0.039 0.039)
New TCC_Curve.104 npts=10 c_array=(1.0 2.0 3.0 3.5 4.0 5.0 6.0 10.0 15.0 100.0) t_array=(0.51 0.16 0.07 0.045 0.027 0.019 0.0155 0.012 0.011 0.011)
New TCC_Curve.106 npts=11 c_array=(1.0 1.5 3.0 4.0 4.5 5.0 6.0 8.0 10.0 15.0 100.0) t_array=(1.5 0.4 0.08 0.03 0.021 0.017 0.014 0.012 0.011 0.0105 0.0105)
New TCC_Curve.117 npts=13 c_array=(1.0 1.5 2.0 2.5 3.0 4.0 5.0 6.0 10.0 20.0 30.0 40.0 100.0) t_array=(6.0 2.5 1.5 1.0 0.69 0.4 0.26 0.2 0.09 0.026 0.017 0.016 0.016)
New TCC_Curve.135 npts=13 c_array=(1.0 1.5 2.0 2.5 3.0 4.0 5.0 6.0 8.0 10.0 15.0 30.0 100.0) t_array=(15.0 6.5 3.9 2.6 2.0 1.4 1.1 0.91 0.72 0.63 0.54 0.52 0.52)
