New Swtcontrol.switch SwitchedObj=Line.switch SwitchedTerm=1 State=closed
New Swtcontrol.75cd8275-35d9-4468-8f5e-4f5becc00c69 SwitchedObj=Line.879a22ee-82c6-4480-85e9-f844c133c7ea SwitchedTerm=1 State=closed
