New WireData.556_5ACSR Rdc=0.115512 Runits=km diam=23.5458 Radunits=mm normamps=730 emergamps=1095
New WireData.n1ACSR Rdc=0.695935 Runits=km diam=10.1092 Radunits=mm normamps=230 emergamps=345
New WireData.n4ACSR Rdc=0.367852 Runits=km diam=14.3002 Radunits=mm normamps=340 emergamps=510
