New PVSystem.05fdc0d0-8593-4be1-9eae-96f007fe7295 phases=3 bus1=ca1022a3-cb05-4f09-ac8a-53e587b96346 kv=13.2 irradiance=1 pmpp=2000 temperature=25 kva=2500 effcurve=GFV01E_0100 daily=GFV01I_0100 tdaily=GFV01T_0100
