Clear
Set DefaultBaseFrequency=50
Redirect Vsource.dss
! Redirect LineCode.dss
Redirect Line-V.dss
Redirect Transformer.dss
Redirect Switch.dss
Redirect LoadShape.dss
Redirect Load.dss
Redirect Capacitor.dss
Redirect PVSystem.dss
Redirect Generator.dss
Redirect Voltagebases.dss
Calcvoltagebases
set mode=Snapshot
solve
LatLongCoords Buscoords.csv
