New PVSystem.783875bd-a541-427d-9ed1-fea572a00304 phases=3 bus1=eb1a1f9e-79e8-4f56-82c5-d31290dd75e4 kv=13.2 irradiance=1 pmpp=2000 temperature=25 kva=2500 effcurve=GFV01E_0100 daily=GFV01I_0100 tdaily=GFV01T_0100
